// SBML level 2 version 3

model temp()

  // Compartments:
  compartment cell = 1;

  // Species:
  species L1_il6r in cell = L1_0; L1_il6r is "L1(il6r)";
  species IL6R_gp130_jak1_l1_socs3_stat in cell = IL6R_0; IL6R_gp130_jak1_l1_socs3_stat is "IL6R(gp130,jak1,l1,socs3,stat)";
  species GP130_il6r_jak2_socs3_stat in cell = GP130_0; GP130_il6r_jak2_socs3_stat is "GP130(il6r,jak2,socs3,stat)";
  species L2_il10r1 in cell = L2_0; L2_il10r1 is "L2(il10r1)";
  species IL10R1_il10r2_jak1_l2_stat in cell = IL10R1_0; IL10R1_il10r2_jak1_l2_stat is "IL10R1(il10r2,jak1,l2,stat)";
  species IL10R2_il10r1 in cell = IL10R2_0; IL10R2_il10r1 is "IL10R2(il10r1)";
  species JAK1_rec_socs1 in cell = JAK1_0; JAK1_rec_socs1 is "JAK1(rec,socs1)";
  species JAK2_gp130 in cell = JAK2_0; JAK2_gp130 is "JAK2(gp130)";
  species SOCS3_gp130_il6r in cell = SOCS3_0; SOCS3_gp130_il6r is "SOCS3(gp130,il6r)";
  species SOCS1_jak1 in cell = SOCS1_0; SOCS1_jak1 is "SOCS1(jak1)";
  species PTP3 in cell = PTP3_0; PTP3 is "PTP3()";
  species PTP1 in cell = PTP1_0; PTP1 is "PTP1()";
  species S3_Y_0 in cell = S3_0; S3_Y_0 is "S3(Y~0)";
  species S1_Y_0 in cell = S1_0; S1_Y_0 is "S1(Y~0)";
  species S15 in cell = 0; S15 is "IL6R(gp130,jak1,l1!1,socs3,stat).L1(il6r!1)";
  species S16 in cell = 0; S16 is "IL10R1(il10r2,jak1,l2!1,stat).L2(il10r1!1)";
  species S17 in cell = 0; S17 is "GP130(il6r!1,jak2,socs3,stat).IL6R(gp130!1,jak1,l1!2,socs3,stat).L1(il6r!2)";
  species S18 in cell = 0; S18 is "IL10R1(il10r2!1,jak1,l2!2,stat).IL10R2(il10r1!1).L2(il10r1!2)";
  species S19 in cell = 0; S19 is "GP130(il6r!1,jak2,socs3,stat).IL6R(gp130!1,jak1!2,l1!3,socs3,stat).JAK1(rec!2,socs1).L1(il6r!3)";
  species S20 in cell = 0; S20 is "GP130(il6r!1,jak2!2,socs3,stat).IL6R(gp130!1,jak1,l1!3,socs3,stat).JAK2(gp130!2).L1(il6r!3)";
  species S21 in cell = 0; S21 is "IL10R1(il10r2!1,jak1!2,l2!3,stat).IL10R2(il10r1!1).JAK1(rec!2,socs1).L2(il10r1!3)";
  species S22 in cell = 0; S22 is "GP130(il6r!1,jak2!2,socs3,stat).IL6R(gp130!1,jak1!3,l1!4,socs3,stat).JAK1(rec!3,socs1).JAK2(gp130!2).L1(il6r!4)";
  species S23 in cell = 0; S23 is "GP130(il6r!1,jak2,socs3,stat).IL6R(gp130!1,jak1!2,l1!3,socs3!4,stat).JAK1(rec!2,socs1).L1(il6r!3).SOCS3(gp130,il6r!4)";
  species S24 in cell = 0; S24 is "GP130(il6r!1,jak2!2,socs3!3,stat).IL6R(gp130!1,jak1,l1!4,socs3,stat).JAK2(gp130!2).L1(il6r!4).SOCS3(gp130!3,il6r)";
  species S25 in cell = 0; S25 is "GP130(il6r!1,jak2,socs3,stat).IL6R(gp130!1,jak1!2,l1!3,socs3,stat).JAK1(rec!2,socs1!4).L1(il6r!3).SOCS1(jak1!4)";
  species S26 in cell = 0; S26 is "GP130(il6r!1,jak2,socs3,stat).IL6R(gp130!1,jak1!2,l1!3,socs3,stat!4).JAK1(rec!2,socs1).L1(il6r!3).S3(Y~P!4)";
  species S27 in cell = 0; S27 is "GP130(il6r!1,jak2,socs3,stat).IL6R(gp130!1,jak1!2,l1!3,socs3,stat!4).JAK1(rec!2,socs1).L1(il6r!3).S1(Y~P!4)";
  species S28 in cell = 0; S28 is "GP130(il6r!1,jak2!2,socs3,stat!3).IL6R(gp130!1,jak1,l1!4,socs3,stat).JAK2(gp130!2).L1(il6r!4).S3(Y~P!3)";
  species S29 in cell = 0; S29 is "GP130(il6r!1,jak2!2,socs3,stat!3).IL6R(gp130!1,jak1,l1!4,socs3,stat).JAK2(gp130!2).L1(il6r!4).S1(Y~P!3)";
  species S30 in cell = 0; S30 is "IL10R1(il10r2!1,jak1!2,l2!3,stat).IL10R2(il10r1!1).JAK1(rec!2,socs1!4).L2(il10r1!3).SOCS1(jak1!4)";
  species S31 in cell = 0; S31 is "IL10R1(il10r2!1,jak1!2,l2!3,stat!4).IL10R2(il10r1!1).JAK1(rec!2,socs1).L2(il10r1!3).S3(Y~P!4)";
  species S32 in cell = 0; S32 is "IL10R1(il10r2!1,jak1!2,l2!3,stat!4).IL10R2(il10r1!1).JAK1(rec!2,socs1).L2(il10r1!3).S1(Y~P!4)";
  species S33 in cell = 0; S33 is "GP130(il6r!1,jak2!2,socs3!3,stat).IL6R(gp130!1,jak1!4,l1!5,socs3,stat).JAK1(rec!4,socs1).JAK2(gp130!2).L1(il6r!5).SOCS3(gp130!3,il6r)";
  species S34 in cell = 0; S34 is "GP130(il6r!1,jak2!2,socs3,stat!3).IL6R(gp130!1,jak1!4,l1!5,socs3,stat).JAK1(rec!4,socs1).JAK2(gp130!2).L1(il6r!5).S3(Y~P!3)";
  species S35 in cell = 0; S35 is "GP130(il6r!1,jak2!2,socs3,stat!3).IL6R(gp130!1,jak1!4,l1!5,socs3,stat).JAK1(rec!4,socs1).JAK2(gp130!2).L1(il6r!5).S1(Y~P!3)";
  species S36 in cell = 0; S36 is "GP130(il6r!1,jak2!2,socs3,stat).IL6R(gp130!1,jak1!3,l1!4,socs3!5,stat).JAK1(rec!3,socs1).JAK2(gp130!2).L1(il6r!4).SOCS3(gp130,il6r!5)";
  species S37 in cell = 0; S37 is "GP130(il6r!1,jak2!2,socs3,stat).IL6R(gp130!1,jak1!3,l1!4,socs3,stat).JAK1(rec!3,socs1!5).JAK2(gp130!2).L1(il6r!4).SOCS1(jak1!5)";
  species S38 in cell = 0; S38 is "GP130(il6r!1,jak2!2,socs3,stat).IL6R(gp130!1,jak1!3,l1!4,socs3,stat!5).JAK1(rec!3,socs1).JAK2(gp130!2).L1(il6r!4).S3(Y~P!5)";
  species S39 in cell = 0; S39 is "GP130(il6r!1,jak2!2,socs3,stat).IL6R(gp130!1,jak1!3,l1!4,socs3,stat!5).JAK1(rec!3,socs1).JAK2(gp130!2).L1(il6r!4).S1(Y~P!5)";
  species S3_Y_P in cell = 0; S3_Y_P is "S3(Y~P)";
  species S1_Y_P in cell = 0; S1_Y_P is "S1(Y~P)";
  species S42 in cell = 0; S42 is "GP130(il6r!1,jak2!2,socs3!3,stat).IL6R(gp130!1,jak1!4,l1!5,socs3!6,stat).JAK1(rec!4,socs1).JAK2(gp130!2).L1(il6r!5).SOCS3(gp130!3,il6r).SOCS3(gp130,il6r!6)";
  species S43 in cell = 0; S43 is "GP130(il6r!1,jak2!2,socs3,stat!3).IL6R(gp130!1,jak1!4,l1!5,socs3!6,stat).JAK1(rec!4,socs1).JAK2(gp130!2).L1(il6r!5).S3(Y~P!3).SOCS3(gp130,il6r!6)";
  species S44 in cell = 0; S44 is "GP130(il6r!1,jak2!2,socs3,stat!3).IL6R(gp130!1,jak1!4,l1!5,socs3!6,stat).JAK1(rec!4,socs1).JAK2(gp130!2).L1(il6r!5).S1(Y~P!3).SOCS3(gp130,il6r!6)";
  species S45 in cell = 0; S45 is "GP130(il6r!1,jak2!2,socs3!3,stat).IL6R(gp130!1,jak1!4,l1!5,socs3,stat).JAK1(rec!4,socs1!6).JAK2(gp130!2).L1(il6r!5).SOCS1(jak1!6).SOCS3(gp130!3,il6r)";
  species S46 in cell = 0; S46 is "GP130(il6r!1,jak2!2,socs3!3,stat).IL6R(gp130!1,jak1!4,l1!5,socs3,stat!6).JAK1(rec!4,socs1).JAK2(gp130!2).L1(il6r!5).S3(Y~P!6).SOCS3(gp130!3,il6r)";
  species S47 in cell = 0; S47 is "GP130(il6r!1,jak2!2,socs3!3,stat).IL6R(gp130!1,jak1!4,l1!5,socs3,stat!6).JAK1(rec!4,socs1).JAK2(gp130!2).L1(il6r!5).S1(Y~P!6).SOCS3(gp130!3,il6r)";
  species S48 in cell = 0; S48 is "GP130(il6r!1,jak2!2,socs3,stat!3).IL6R(gp130!1,jak1!4,l1!5,socs3,stat).JAK1(rec!4,socs1!6).JAK2(gp130!2).L1(il6r!5).S3(Y~P!3).SOCS1(jak1!6)";
  species S49 in cell = 0; S49 is "GP130(il6r!1,jak2!2,socs3,stat!3).IL6R(gp130!1,jak1!4,l1!5,socs3,stat).JAK1(rec!4,socs1!6).JAK2(gp130!2).L1(il6r!5).S1(Y~P!3).SOCS1(jak1!6)";
  species S50 in cell = 0; S50 is "GP130(il6r!1,jak2!2,socs3,stat!3).IL6R(gp130!1,jak1!4,l1!5,socs3,stat!6).JAK1(rec!4,socs1).JAK2(gp130!2).L1(il6r!5).S3(Y~P!3).S3(Y~P!6)";
  species S51 in cell = 0; S51 is "GP130(il6r!1,jak2!2,socs3,stat!3).IL6R(gp130!1,jak1!4,l1!5,socs3,stat!6).JAK1(rec!4,socs1).JAK2(gp130!2).L1(il6r!5).S1(Y~P!3).S3(Y~P!6)";
  species S52 in cell = 0; S52 is "GP130(il6r!1,jak2!2,socs3,stat!3).IL6R(gp130!1,jak1!4,l1!5,socs3,stat!6).JAK1(rec!4,socs1).JAK2(gp130!2).L1(il6r!5).S1(Y~P!6).S3(Y~P!3)";
  species S53 in cell = 0; S53 is "GP130(il6r!1,jak2!2,socs3,stat!3).IL6R(gp130!1,jak1!4,l1!5,socs3,stat!6).JAK1(rec!4,socs1).JAK2(gp130!2).L1(il6r!5).S1(Y~P!3).S1(Y~P!6)";

  // Parameters:
  il6_il6r_binding = 0.01679;
  il6_il6r_unbinding = 2.22e-6;
  il6r_gp130_binding = 4.1384;
  il6r_gp130_unbinding = 0.0015447;
  il6_complex_jak1_binding = 3.45e-5;
  il6_complex_jak1_unbinding = 0.080367;
  il6_complex_jak2_binding = 0.029552;
  il6_complex_jak2_unbinding = 1.17e-8;
  SOCS3_il6r_binding = 6759.2;
  SOCS3_il6r_unbinding = 0.22405;
  SOCS3_gp130_binding = 1991.9;
  SOCS3_gp130_unbinding = 2.32e-5;
  il6_jak1_med_STAT3_act = 6.56e-5;
  il6_jak1_med_STAT1_act = 1.8e-5;
  il6_jak2_med_STAT3_act = 0.63155;
  il6_jak2_med_STAT1_act = 0.00040048;
  il10_il10r1_binding = 0.0046447;
  il10_il10r1_unbinding = 0.0071473;
  il10r1_il10r2_binding = 0.021968;
  il10r1_il10r2_unbinding = 4.12e-7;
  il10_complex_jak1_binding = 210.72;
  il10_complex_jak1_unbinding = 1.64e-5;
  il10_jak1_med_STAT3_act = 0.35205;
  il10_jak1_med_STAT1_act = 8.44e-5;
  SOCS1_jak1_binding = 28.677;
  SOCS1_jak1_unbinding = 0.17372;
  pSTAT3_rec_dissoc = 0.0906;
  pSTAT1_rec_dissoc = 1.312;
  PTP_med_STAT3_deact = 45.754;
  PTP_med_STAT1_deact = 0.0083683;
  STAT3_SOCS3_ind = 2930.2;
  STAT3_SOCS1_ind = 180.71;
  STAT1_SOCS3_ind = 276.71;
  STAT1_SOCS1_ind = 5143.4;
  L1_0 = 0;
  L2_0 = 0;
  IL6R_0 = 24.422;
  GP130_0 = 156.52;
  IL10R1_0 = 2573.9;
  IL10R2_0 = 1.3915;
  JAK1_0 = 301.53;
  JAK2_0 = 0.82478;
  SOCS3_0 = 0;
  SOCS1_0 = 0;
  PTP3_0 = 0.70846;
  PTP1_0 = 18.354;
  SOCS3_degrad = 7.64e-8;
  SOCS1_degrad = 0.00014035;
  S3_0 = 0.0040953;
  S1_0 = 0.011716;

  // Assignment rules:
  total_pS3 := S26 + S28 + S31 + S34 + S38 + S3_Y_P + S43 + S46 + S48 + 2*S50 + S51 + S52;
  total_pS1 := S27 + S29 + S32 + S35 + S39 + S1_Y_P + S44 + S47 + S49 + S51 + S52 + 2*S53;

  // Reactions:
  R1: L1_il6r + IL6R_gp130_jak1_l1_socs3_stat => S15; il6_il6r_binding*L1_il6r*IL6R_gp130_jak1_l1_socs3_stat;
  R2: L2_il10r1 + IL10R1_il10r2_jak1_l2_stat => S16; il10_il10r1_binding*L2_il10r1*IL10R1_il10r2_jak1_l2_stat;
  R3: SOCS3_gp130_il6r => ; SOCS3_degrad*SOCS3_gp130_il6r;
  R4: SOCS1_jak1 => ; SOCS1_degrad*SOCS1_jak1;
  R5: S15 => L1_il6r + IL6R_gp130_jak1_l1_socs3_stat; il6_il6r_unbinding*S15;
  R6: GP130_il6r_jak2_socs3_stat + S15 => S17; il6r_gp130_binding*GP130_il6r_jak2_socs3_stat*S15;
  R7: S16 => L2_il10r1 + IL10R1_il10r2_jak1_l2_stat; il10_il10r1_unbinding*S16;
  R8: IL10R2_il10r1 + S16 => S18; il10r1_il10r2_binding*IL10R2_il10r1*S16;
  R9: S17 => GP130_il6r_jak2_socs3_stat + S15; il6r_gp130_unbinding*S17;
  R10: JAK1_rec_socs1 + S17 => S19; il6_complex_jak1_binding*JAK1_rec_socs1*S17;
  R11: JAK2_gp130 + S17 => S20; il6_complex_jak2_binding*JAK2_gp130*S17;
  R12: S18 => IL10R2_il10r1 + S16; il10r1_il10r2_unbinding*S18;
  R13: JAK1_rec_socs1 + S18 => S21; il10_complex_jak1_binding*JAK1_rec_socs1*S18;
  R14: JAK1_rec_socs1 + S20 => S22; il6_complex_jak1_binding*JAK1_rec_socs1*S20;
  R15: S19 => JAK1_rec_socs1 + S17; il6_complex_jak1_unbinding*S19;
  R16: JAK2_gp130 + S19 => S22; il6_complex_jak2_binding*JAK2_gp130*S19;
  R17: S20 => JAK2_gp130 + S17; il6_complex_jak2_unbinding*S20;
  R18: SOCS3_gp130_il6r + S19 => S23; SOCS3_il6r_binding*SOCS3_gp130_il6r*S19;
  R19: SOCS3_gp130_il6r + S20 => S24; SOCS3_gp130_binding*SOCS3_gp130_il6r*S20;
  R20: SOCS1_jak1 + S19 => S25; SOCS1_jak1_binding*SOCS1_jak1*S19;
  R21: S3_Y_0 + S19 => S26; il6_jak1_med_STAT3_act*S3_Y_0*S19;
  R22: S1_Y_0 + S19 => S27; il6_jak1_med_STAT1_act*S1_Y_0*S19;
  R23: S3_Y_0 + S20 => S28; il6_jak2_med_STAT3_act*S3_Y_0*S20;
  R24: S1_Y_0 + S20 => S29; il6_jak2_med_STAT1_act*S1_Y_0*S20;
  R25: S21 => JAK1_rec_socs1 + S18; il10_complex_jak1_unbinding*S21;
  R26: SOCS1_jak1 + S21 => S30; SOCS1_jak1_binding*SOCS1_jak1*S21;
  R27: S3_Y_0 + S21 => S31; il10_jak1_med_STAT3_act*S3_Y_0*S21;
  R28: S1_Y_0 + S21 => S32; il10_jak1_med_STAT1_act*S1_Y_0*S21;
  R29: JAK1_rec_socs1 + S24 => S33; il6_complex_jak1_binding*JAK1_rec_socs1*S24;
  R30: JAK1_rec_socs1 + S28 => S34; il6_complex_jak1_binding*JAK1_rec_socs1*S28;
  R31: JAK1_rec_socs1 + S29 => S35; il6_complex_jak1_binding*JAK1_rec_socs1*S29;
  R32: S22 => JAK1_rec_socs1 + S20; il6_complex_jak1_unbinding*S22;
  R33: JAK2_gp130 + S23 => S36; il6_complex_jak2_binding*JAK2_gp130*S23;
  R34: JAK2_gp130 + S25 => S37; il6_complex_jak2_binding*JAK2_gp130*S25;
  R35: JAK2_gp130 + S26 => S38; il6_complex_jak2_binding*JAK2_gp130*S26;
  R36: JAK2_gp130 + S27 => S39; il6_complex_jak2_binding*JAK2_gp130*S27;
  R37: S22 => JAK2_gp130 + S19; il6_complex_jak2_unbinding*S22;
  R38: SOCS3_gp130_il6r + S22 => S36; SOCS3_il6r_binding*SOCS3_gp130_il6r*S22;
  R39: S23 => SOCS3_gp130_il6r + S19; SOCS3_il6r_unbinding*S23;
  R40: SOCS3_gp130_il6r + S22 => S33; SOCS3_gp130_binding*SOCS3_gp130_il6r*S22;
  R41: S24 => SOCS3_gp130_il6r + S20; SOCS3_gp130_unbinding*S24;
  R42: SOCS1_jak1 + S22 => S37; SOCS1_jak1_binding*SOCS1_jak1*S22;
  R43: S25 => SOCS1_jak1 + S19; SOCS1_jak1_unbinding*S25;
  R44: S3_Y_0 + S22 => S38; il6_jak1_med_STAT3_act*S3_Y_0*S22;
  R45: S26 => S19 + S3_Y_P; pSTAT3_rec_dissoc*S26;
  R46: S1_Y_0 + S22 => S39; il6_jak1_med_STAT1_act*S1_Y_0*S22;
  R47: S27 => S19 + S1_Y_P; pSTAT1_rec_dissoc*S27;
  R48: S3_Y_0 + S22 => S34; il6_jak2_med_STAT3_act*S3_Y_0*S22;
  R49: S28 => S20 + S3_Y_P; pSTAT3_rec_dissoc*S28;
  R50: S1_Y_0 + S22 => S35; il6_jak2_med_STAT1_act*S1_Y_0*S22;
  R51: S29 => S20 + S1_Y_P; pSTAT1_rec_dissoc*S29;
  R52: S30 => SOCS1_jak1 + S21; SOCS1_jak1_unbinding*S30;
  R53: S31 => S21 + S3_Y_P; pSTAT3_rec_dissoc*S31;
  R54: S32 => S21 + S1_Y_P; pSTAT1_rec_dissoc*S32;
  R55: S33 => JAK1_rec_socs1 + S24; il6_complex_jak1_unbinding*S33;
  R56: S34 => JAK1_rec_socs1 + S28; il6_complex_jak1_unbinding*S34;
  R57: S35 => JAK1_rec_socs1 + S29; il6_complex_jak1_unbinding*S35;
  R58: S36 => JAK2_gp130 + S23; il6_complex_jak2_unbinding*S36;
  R59: S37 => JAK2_gp130 + S25; il6_complex_jak2_unbinding*S37;
  R60: S38 => JAK2_gp130 + S26; il6_complex_jak2_unbinding*S38;
  R61: S39 => JAK2_gp130 + S27; il6_complex_jak2_unbinding*S39;
  R62: SOCS3_gp130_il6r + S33 => S42; SOCS3_il6r_binding*SOCS3_gp130_il6r*S33;
  R63: SOCS3_gp130_il6r + S34 => S43; SOCS3_il6r_binding*SOCS3_gp130_il6r*S34;
  R64: SOCS3_gp130_il6r + S35 => S44; SOCS3_il6r_binding*SOCS3_gp130_il6r*S35;
  R65: S36 => SOCS3_gp130_il6r + S22; SOCS3_il6r_unbinding*S36;
  R66: SOCS3_gp130_il6r + S36 => S42; SOCS3_gp130_binding*SOCS3_gp130_il6r*S36;
  R67: SOCS3_gp130_il6r + S37 => S45; SOCS3_gp130_binding*SOCS3_gp130_il6r*S37;
  R68: SOCS3_gp130_il6r + S38 => S46; SOCS3_gp130_binding*SOCS3_gp130_il6r*S38;
  R69: SOCS3_gp130_il6r + S39 => S47; SOCS3_gp130_binding*SOCS3_gp130_il6r*S39;
  R70: S33 => SOCS3_gp130_il6r + S22; SOCS3_gp130_unbinding*S33;
  R71: SOCS1_jak1 + S33 => S45; SOCS1_jak1_binding*SOCS1_jak1*S33;
  R72: SOCS1_jak1 + S34 => S48; SOCS1_jak1_binding*SOCS1_jak1*S34;
  R73: SOCS1_jak1 + S35 => S49; SOCS1_jak1_binding*SOCS1_jak1*S35;
  R74: S37 => SOCS1_jak1 + S22; SOCS1_jak1_unbinding*S37;
  R75: S3_Y_0 + S33 => S46; il6_jak1_med_STAT3_act*S3_Y_0*S33;
  R76: S3_Y_0 + S34 => S50; il6_jak1_med_STAT3_act*S3_Y_0*S34;
  R77: S3_Y_0 + S35 => S51; il6_jak1_med_STAT3_act*S3_Y_0*S35;
  R78: S38 => S22 + S3_Y_P; pSTAT3_rec_dissoc*S38;
  R79: S1_Y_0 + S33 => S47; il6_jak1_med_STAT1_act*S1_Y_0*S33;
  R80: S1_Y_0 + S34 => S52; il6_jak1_med_STAT1_act*S1_Y_0*S34;
  R81: S1_Y_0 + S35 => S53; il6_jak1_med_STAT1_act*S1_Y_0*S35;
  R82: S39 => S22 + S1_Y_P; pSTAT1_rec_dissoc*S39;
  R83: S3_Y_0 + S36 => S43; il6_jak2_med_STAT3_act*S3_Y_0*S36;
  R84: S3_Y_0 + S37 => S48; il6_jak2_med_STAT3_act*S3_Y_0*S37;
  R85: S3_Y_0 + S38 => S50; il6_jak2_med_STAT3_act*S3_Y_0*S38;
  R86: S3_Y_0 + S39 => S52; il6_jak2_med_STAT3_act*S3_Y_0*S39;
  R87: S34 => S22 + S3_Y_P; pSTAT3_rec_dissoc*S34;
  R88: S1_Y_0 + S36 => S44; il6_jak2_med_STAT1_act*S1_Y_0*S36;
  R89: S1_Y_0 + S37 => S49; il6_jak2_med_STAT1_act*S1_Y_0*S37;
  R90: S1_Y_0 + S38 => S51; il6_jak2_med_STAT1_act*S1_Y_0*S38;
  R91: S1_Y_0 + S39 => S53; il6_jak2_med_STAT1_act*S1_Y_0*S39;
  R92: S35 => S22 + S1_Y_P; pSTAT1_rec_dissoc*S35;
  R93: PTP3 + S3_Y_P => PTP3 + S3_Y_0; PTP_med_STAT3_deact*PTP3*S3_Y_P;
  R94: PTP1 + S1_Y_P => PTP1 + S1_Y_0; PTP_med_STAT1_deact*PTP1*S1_Y_P;
  R95: S3_Y_P => SOCS3_gp130_il6r + S3_Y_P; STAT3_SOCS3_ind*S3_Y_P;
  R96: S3_Y_P => SOCS1_jak1 + S3_Y_P; STAT3_SOCS1_ind*S3_Y_P;
  R97: S1_Y_P => SOCS3_gp130_il6r + S1_Y_P; STAT1_SOCS3_ind*S1_Y_P;
  R98: S1_Y_P => SOCS1_jak1 + S1_Y_P; STAT1_SOCS1_ind*S1_Y_P;
  R99: S42 => SOCS3_gp130_il6r + S33; SOCS3_il6r_unbinding*S42;
  R100: S43 => SOCS3_gp130_il6r + S34; SOCS3_il6r_unbinding*S43;
  R101: S44 => SOCS3_gp130_il6r + S35; SOCS3_il6r_unbinding*S44;
  R102: S42 => SOCS3_gp130_il6r + S36; SOCS3_gp130_unbinding*S42;
  R103: S45 => SOCS3_gp130_il6r + S37; SOCS3_gp130_unbinding*S45;
  R104: S46 => SOCS3_gp130_il6r + S38; SOCS3_gp130_unbinding*S46;
  R105: S47 => SOCS3_gp130_il6r + S39; SOCS3_gp130_unbinding*S47;
  R106: S45 => SOCS1_jak1 + S33; SOCS1_jak1_unbinding*S45;
  R107: S48 => SOCS1_jak1 + S34; SOCS1_jak1_unbinding*S48;
  R108: S49 => SOCS1_jak1 + S35; SOCS1_jak1_unbinding*S49;
  R109: S46 => S33 + S3_Y_P; pSTAT3_rec_dissoc*S46;
  R110: S50 => S34 + S3_Y_P; pSTAT3_rec_dissoc*S50;
  R111: S51 => S35 + S3_Y_P; pSTAT3_rec_dissoc*S51;
  R112: S47 => S33 + S1_Y_P; pSTAT1_rec_dissoc*S47;
  R113: S52 => S34 + S1_Y_P; pSTAT1_rec_dissoc*S52;
  R114: S53 => S35 + S1_Y_P; pSTAT1_rec_dissoc*S53;
  R115: S43 => S36 + S3_Y_P; pSTAT3_rec_dissoc*S43;
  R116: S48 => S37 + S3_Y_P; pSTAT3_rec_dissoc*S48;
  R117: S50 => S38 + S3_Y_P; pSTAT3_rec_dissoc*S50;
  R118: S52 => S39 + S3_Y_P; pSTAT3_rec_dissoc*S52;
  R119: S44 => S36 + S1_Y_P; pSTAT1_rec_dissoc*S44;
  R120: S49 => S37 + S1_Y_P; pSTAT1_rec_dissoc*S49;
  R121: S51 => S38 + S1_Y_P; pSTAT1_rec_dissoc*S51;
  R122: S53 => S39 + S1_Y_P; pSTAT1_rec_dissoc*S53;

  // Unit definitions:
  unit substance = item;
end
